OpenVSP model (file version 5), 18 components.
Geometry view with OpenVSP parameter names; values to 6 digits, angles in degrees, lengths in the model's unit.
Overall bounding box: X_Min=-0.0664045 X_Len=251.828 Y_Min=-248.985 Y_Len=497.97 Z_Min=-15.1232 Z_Len=72.2922

Wing "WingGeom"
  location (X Y Z) 0 0 0, rotation 0 0 0
  symmetric about XZ
  bounding box size 226.283 497.97 36.0195
  mass: Density=83 Shell_Flag=1 Mass_Area=1 Mass_Prior=0
  totals: TotalSpan=494.987 TotalProjectedSpan=494.987 TotalChord=153.005 TotalArea=43170.6 TotalAR=5.67544
  root: chord 211.368, twist 0, NACA 4-series Camber=0.04 CamberLoc=0.4 ThickChord=0.12
  sections:
    n  Span     Root_Chord  Tip_Chord  Area     Sweep  Sweep_Location  Dihedral  Twist  Twist_Location  tip airfoil
    1  19.1995  211.368     192.988    3881.71  45     0               0         0      0.25            as above
    2  10.7475  192.988     196.27     2091.78  45     0               0         0      0.25            as above
    3  9.52411  196.27      162.905    1710.41  45     0               0         0      0.25            as above
    4  19.2587  162.905     93.1997    2466.12  45     0               0         0      0.25            as above
    5  188.763  93.1997     27.9599    11435.3  30     0               0         0      0.25            as above
  SS_Control "SS_CONT_0": UStart=0 UEnd=0.2 Length_C_Start=0.141933 Length_C_End=0.154923 Length_Start=30 Length_End=30 LE_Flag=0 Surf_Type=2
  SS_Control "SS_CONT_1": UStart=0.67 UEnd=0.74 Length_C_Start=0.25 Length_C_End=0.25 Length_Start=22.9737 Length_End=16.1236 LE_Flag=0 Surf_Type=2
  SS_Control "SS_CONT_2": UStart=0.74 UEnd=0.79 Length_C_Start=0.25 Length_C_End=0.25 Length_Start=16.1236 Length_End=11.2306 LE_Flag=0 Surf_Type=2
  SS_Control "SS_CONT_3": UStart=0.79 UEnd=0.825 Length_C_Start=0.25 Length_C_End=0.25 Length_Start=11.2306 Length_End=7.80548 LE_Flag=0 Surf_Type=2

Wing "WingGeom"
  location (X Y Z) 170 30 0, rotation 70 -1 0
  symmetric about XZ
  bounding box size 81.7628 101.05 58.0514
  mass: Density=83 Shell_Flag=1 Mass_Area=1 Mass_Prior=0
  totals: TotalSpan=120 TotalProjectedSpan=120 TotalChord=40 TotalArea=4800 TotalAR=3
  root: chord 57.1429, twist 0, NACA 4-series Camber=0 CamberLoc=0.2 ThickChord=0.1
  sections:
    n  Span  Root_Chord  Tip_Chord  Area  Sweep  Sweep_Location  Dihedral  Twist  Twist_Location  tip airfoil
    1  60    57.1429     22.8571    2400  40     0.25            0         0      0.25            as above

Fuselage "FuselageGeom"
  location (X Y Z) 50 60 17.5, rotation 0 0 0
  bounding box size 24 21.4853 21.4853
  mass: Density=12 Shell_Flag=0 Mass_Area=1 Mass_Prior=0
  Design: Length=24
  cross sections:
    n  XLocPercent  YLocPercent  ZLocPercent  shape
    0  0            0            0            circle Circle_Diameter=13
    1  1            0            0            as above

Fuselage "FuselageGeom", child of "FuselageGeom"
  location (X Y Z) 50 77 18, rotation 0 0 0
  bounding box size 24 21.4853 21.4853
  mass: Density=12 Shell_Flag=0 Mass_Area=1 Mass_Prior=0
  Design: Length=24
  cross sections:
    n  XLocPercent  YLocPercent  ZLocPercent  shape
    0  0            0            0            circle Circle_Diameter=13
    1  1            0            0            as above

Fuselage "FuselageGeom", child of "FuselageGeom"
  location (X Y Z) 50 94 18, rotation 0 0 0
  bounding box size 24 21.4853 21.4853
  mass: Density=12 Shell_Flag=0 Mass_Area=1 Mass_Prior=0
  Design: Length=24
  cross sections:
    n  XLocPercent  YLocPercent  ZLocPercent  shape
    0  0            0            0            circle Circle_Diameter=13
    1  1            0            0            as above

Fuselage "FuselageGeom", child of "FuselageGeom"
  location (X Y Z) 50 111 18, rotation 0 0 0
  bounding box size 24 21.4853 21.4853
  mass: Density=12 Shell_Flag=0 Mass_Area=1 Mass_Prior=0
  Design: Length=24
  cross sections:
    n  XLocPercent  YLocPercent  ZLocPercent  shape
    0  0            0            0            circle Circle_Diameter=13
    1  1            0            0            as above

Fuselage "FuselageGeom", child of "FuselageGeom"
  location (X Y Z) 50 68.5 32, rotation 0 0 0
  bounding box size 24 21.4853 21.4853
  mass: Density=12 Shell_Flag=0 Mass_Area=1 Mass_Prior=0
  Design: Length=24
  cross sections:
    n  XLocPercent  YLocPercent  ZLocPercent  shape
    0  0            0            0            circle Circle_Diameter=13
    1  1            0            0            as above

Fuselage "FuselageGeom", child of "FuselageGeom"
  location (X Y Z) 50 85.5 32, rotation 0 0 0
  bounding box size 24 21.4853 21.4853
  mass: Density=12 Shell_Flag=0 Mass_Area=1 Mass_Prior=0
  Design: Length=24
  cross sections:
    n  XLocPercent  YLocPercent  ZLocPercent  shape
    0  0            0            0            circle Circle_Diameter=13
    1  1            0            0            as above

Fuselage "FuselageGeom", child of "FuselageGeom"
  location (X Y Z) 50 102.5 32, rotation 0 0 0
  bounding box size 24 21.4853 21.4853
  mass: Density=12 Shell_Flag=0 Mass_Area=1 Mass_Prior=0
  Design: Length=24
  cross sections:
    n  XLocPercent  YLocPercent  ZLocPercent  shape
    0  0            0            0            circle Circle_Diameter=13
    1  1            0            0            as above

Fuselage "FuselageGeom", child of "FuselageGeom"
  location (X Y Z) 50 85 5, rotation 0 20 0
  bounding box size 23.9207 12.4853 14.503
  mass: Density=12 Shell_Flag=0 Mass_Area=1 Mass_Prior=0
  Design: Length=24
  cross sections:
    n  XLocPercent  YLocPercent  ZLocPercent  shape
    0  0            0            0            circle Circle_Diameter=4
    1  1            0            0            as above

Fuselage "FuselageGeom"
  location (X Y Z) 50 -110 18, rotation 0 0 0
  bounding box size 24 21.4853 21.4853
  mass: Density=12 Shell_Flag=0 Mass_Area=1 Mass_Prior=0
  Design: Length=24
  cross sections:
    n  XLocPercent  YLocPercent  ZLocPercent  shape
    0  0            0            0            circle Circle_Diameter=13
    1  1            0            0            as above

Fuselage "FuselageGeom", child of "FuselageGeom"
  location (X Y Z) 50 -93 18, rotation 0 0 0
  bounding box size 24 21.4853 21.4853
  mass: Density=12 Shell_Flag=0 Mass_Area=1 Mass_Prior=0
  Design: Length=24
  cross sections:
    n  XLocPercent  YLocPercent  ZLocPercent  shape
    0  0            0            0            circle Circle_Diameter=13
    1  1            0            0            as above

Fuselage "FuselageGeom", child of "FuselageGeom"
  location (X Y Z) 50 -76 18, rotation 0 0 0
  bounding box size 24 21.4853 21.4853
  mass: Density=12 Shell_Flag=0 Mass_Area=1 Mass_Prior=0
  Design: Length=24
  cross sections:
    n  XLocPercent  YLocPercent  ZLocPercent  shape
    0  0            0            0            circle Circle_Diameter=13
    1  1            0            0            as above

Fuselage "FuselageGeom", child of "FuselageGeom"
  location (X Y Z) 50 -59 18, rotation 0 0 0
  bounding box size 24 21.4853 21.4853
  mass: Density=12 Shell_Flag=0 Mass_Area=1 Mass_Prior=0
  Design: Length=24
  cross sections:
    n  XLocPercent  YLocPercent  ZLocPercent  shape
    0  0            0            0            circle Circle_Diameter=13
    1  1            0            0            as above

Fuselage "FuselageGeom", child of "FuselageGeom"
  location (X Y Z) 50 -101.5 32, rotation 0 0 0
  bounding box size 24 21.4853 21.4853
  mass: Density=12 Shell_Flag=0 Mass_Area=1 Mass_Prior=0
  Design: Length=24
  cross sections:
    n  XLocPercent  YLocPercent  ZLocPercent  shape
    0  0            0            0            circle Circle_Diameter=13
    1  1            0            0            as above

Fuselage "FuselageGeom", child of "FuselageGeom"
  location (X Y Z) 50 -84.5 32, rotation 0 0 0
  bounding box size 24 21.4853 21.4853
  mass: Density=12 Shell_Flag=0 Mass_Area=1 Mass_Prior=0
  Design: Length=24
  cross sections:
    n  XLocPercent  YLocPercent  ZLocPercent  shape
    0  0            0            0            circle Circle_Diameter=13
    1  1            0            0            as above

Fuselage "FuselageGeom", child of "FuselageGeom"
  location (X Y Z) 50 -67.5 32, rotation 0 0 0
  bounding box size 24 21.4853 21.4853
  mass: Density=12 Shell_Flag=0 Mass_Area=1 Mass_Prior=0
  Design: Length=24
  cross sections:
    n  XLocPercent  YLocPercent  ZLocPercent  shape
    0  0            0            0            circle Circle_Diameter=13
    1  1            0            0            as above

Fuselage "FuselageGeom", child of "FuselageGeom"
  location (X Y Z) 50 -85 5, rotation 0 20 0
  bounding box size 23.9207 12.4853 14.503
  mass: Density=12 Shell_Flag=0 Mass_Area=1 Mass_Prior=0
  Design: Length=24
  cross sections:
    n  XLocPercent  YLocPercent  ZLocPercent  shape
    0  0            0            0            circle Circle_Diameter=4
    1  1            0            0            as above

VSPAERO settings: Sref=43170.6 bref=494.987 cref=153.005 Xcg=109.881 Ycg=0 Zcg=4.4802 AlphaStart=4 AlphaEnd=6 AlphaNpts=1 BetaStart=0 BetaEnd=0 BetaNpts=1 MachStart=0.7 MachEnd=0 MachNpts=1 ReCref=1.8e+09 Vinf=100 Rho=0.002377
  control group "Unnamed Control Group": DeflectionAngle=0
