OpenVSP model (file version 5), 31 components.
Geometry view with OpenVSP parameter names; values to 6 digits, angles in degrees, lengths in the model's unit.
Overall bounding box: X_Min=-10 X_Len=261.762 Y_Min=-249.456 Y_Len=498.913 Z_Min=-51.6488 Z_Len=108.818

Wing "WingGeom"
  location (X Y Z) 0 0 0, rotation 0 -1 0
  symmetric about XZ
  bounding box size 212.234 498.913 27.9348
  totals: TotalSpan=495.929 TotalProjectedSpan=495.929 TotalChord=149.592 TotalArea=43000 TotalAR=5.71967
  root: chord 211.368, twist 0, NACA 4-series Camber=0.04 CamberLoc=0.4 ThickChord=0.12
  sections:
    n  Span     Root_Chord  Tip_Chord  Area     Sweep  Sweep_Location  Dihedral  Twist  Twist_Location  tip airfoil
    1  19.1995  211.368     192.988    3881.71  45     0               0         0      0.25            as above
    2  11.2188  192.988     179.203    2087.77  45     0               0         0      0.25            as above
    3  9.52411  179.203     162.905    1629.14  45     0               0         0      0.25            as above
    4  19.2587  162.905     93.1997    2466.12  45     0               0         0      0.25            as above
    5  188.763  93.1997     27.9599    11435.3  30     0               0         0      0.25            as above
  SS_Control "SS_CONT_0": UStart=0 UEnd=0.2 Length_C_Start=0.141933 Length_C_End=0.157703 Length_Start=30 Length_End=30 LE_Flag=0 Surf_Type=2
  SS_Control "SS_CONT_1": UStart=0.67 UEnd=0.74 Length_C_Start=0.25 Length_C_End=0.25 Length_Start=22.9737 Length_End=16.1236 LE_Flag=0 Surf_Type=2
  SS_Control "SS_CONT_2": UStart=0.74 UEnd=0.79 Length_C_Start=0.25 Length_C_End=0.25 Length_Start=16.1236 Length_End=11.2306 LE_Flag=0 Surf_Type=2
  SS_Control "SS_CONT_3": UStart=0.79 UEnd=0.9 Length_C_Start=0.25 Length_C_End=0.25 Length_Start=11.2306 Length_End=6.98998 LE_Flag=0 Surf_Type=2

Conformal "ConformalGeom", child of "WingGeom"
  location (X Y Z) 0 0 0, rotation 0 -1 0; relative location 0 0 0, rotation 0 0 0
  symmetric about XZ
  bounding box size 113.028 361.988 9.25463
  Design: ChordTrimFlag=0 ChordTrimMax=0.9 ChordTrimMin=0.1 Offset=1.5 UTrimFlag=1 UTrimMax=0.93 UTrimMin=0.81 V1TrimBegin=0.1 V1TrimEnd=0.3 V1TrimFlag=0 V2TrimBegin=0.533333 V2TrimEnd=0.75 V2TrimFlag=0

Custom "BoxGroup"
  location (X Y Z) 60 0 10, rotation 0 90 0
  symmetric about XZ
  bounding box size 125 80 9.5
  Design: BoxLayout=0 GapCol=1 GapRow=1 Height=20 LayoutTrigger=0 Length=9.5 NumCol=6 NumRow=5 SquareFlag=0 Width=8
  custom script BoxGroup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

Human "HumanGeom", child of "BoxGroup"
  location (X Y Z) 10 -4.32836 3.8806, rotation 0 0 0
  mass: Density=69.3496 Shell_Flag=0 Mass_Area=1 Mass_Prior=0
  Anthropometric: Age=30 AutoDensity=1 BMI=27.7 BMI_pct=0.5 GenderFlag=0 LenUnit=4 Mass=188.306 MassUnit=3 SitFrac=0.51 Stature=5.76115 Stature_pct=0.5 Volume=2.71531

Human "HumanGeom", child of "HumanGeom"
  location (X Y Z) 10 2.83582 3.8806, rotation 0 0 0
  mass: Density=65.8007 Shell_Flag=0 Mass_Area=1 Mass_Prior=0
  Anthropometric: Age=30 AutoDensity=1 BMI=27.7 BMI_pct=0.5 GenderFlag=0 LenUnit=4 Mass=188.306 MassUnit=3 SitFrac=0.51 Stature=5.76115 Stature_pct=0.5 Volume=2.86175

Wing "WingGeom"
  location (X Y Z) 170 30 0, rotation 70 -1 0
  symmetric about XZ
  bounding box size 81.7628 101.05 58.0514
  totals: TotalSpan=120 TotalProjectedSpan=120 TotalChord=40 TotalArea=4800 TotalAR=3
  root: chord 57.1429, twist 0, NACA 4-series Camber=0 CamberLoc=0.2 ThickChord=0.1
  sections:
    n  Span  Root_Chord  Tip_Chord  Area  Sweep  Sweep_Location  Dihedral  Twist  Twist_Location  tip airfoil
    1  60    57.1429     22.8571    2400  40     0.25            0         0      0.25            as above

Fuselage "FuselageGeom"
  location (X Y Z) 50 60 20, rotation 0 -8.16216 0
  bounding box size 25.6026 21.4853 21.2676
  Design: Length=24
  cross sections:
    n  XLocPercent  YLocPercent  ZLocPercent  shape
    0  0            0            0            circle Circle_Diameter=13
    1  1            0            0            as above

Fuselage "FuselageGeom", child of "FuselageGeom"
  location (X Y Z) 50 77 20, rotation 0 0 0
  bounding box size 24 21.4853 21.4853
  Design: Length=24
  cross sections:
    n  XLocPercent  YLocPercent  ZLocPercent  shape
    0  0            0            0            circle Circle_Diameter=13
    1  1            0            0            as above

Fuselage "FuselageGeom", child of "FuselageGeom"
  location (X Y Z) 50 94 20, rotation 0 0 0
  bounding box size 24 21.4853 21.4853
  Design: Length=24
  cross sections:
    n  XLocPercent  YLocPercent  ZLocPercent  shape
    0  0            0            0            circle Circle_Diameter=13
    1  1            0            0            as above

Fuselage "FuselageGeom", child of "FuselageGeom"
  location (X Y Z) 50 111 20, rotation 0 0 0
  bounding box size 24 21.4853 21.4853
  Design: Length=24
  cross sections:
    n  XLocPercent  YLocPercent  ZLocPercent  shape
    0  0            0            0            circle Circle_Diameter=13
    1  1            0            0            as above

Fuselage "FuselageGeom", child of "FuselageGeom"
  location (X Y Z) 50 68.5 34, rotation 0 0 0
  bounding box size 24 21.4853 21.4853
  Design: Length=24
  cross sections:
    n  XLocPercent  YLocPercent  ZLocPercent  shape
    0  0            0            0            circle Circle_Diameter=13
    1  1            0            0            as above

Fuselage "FuselageGeom", child of "FuselageGeom"
  location (X Y Z) 50 85.5 34, rotation 0 0 0
  bounding box size 24 21.4853 21.4853
  Design: Length=24
  cross sections:
    n  XLocPercent  YLocPercent  ZLocPercent  shape
    0  0            0            0            circle Circle_Diameter=13
    1  1            0            0            as above

Fuselage "FuselageGeom", child of "FuselageGeom"
  location (X Y Z) 50 102.5 34, rotation 0 0 0
  bounding box size 24 21.4853 21.4853
  Design: Length=24
  cross sections:
    n  XLocPercent  YLocPercent  ZLocPercent  shape
    0  0            0            0            circle Circle_Diameter=13
    1  1            0            0            as above

Fuselage "FuselageGeom", child of "FuselageGeom"
  location (X Y Z) 50 119.5 34, rotation 0 0 0
  bounding box size 24 21.4853 21.4853
  Design: Length=24
  cross sections:
    n  XLocPercent  YLocPercent  ZLocPercent  shape
    0  0            0            0            circle Circle_Diameter=13
    1  1            0            0            as above

Fuselage "FuselageGeom"
  location (X Y Z) 50 -110 20, rotation 0 0 0
  bounding box size 24 21.4853 21.4853
  Design: Length=24
  cross sections:
    n  XLocPercent  YLocPercent  ZLocPercent  shape
    0  0            0            0            circle Circle_Diameter=13
    1  1            0            0            as above

Fuselage "FuselageGeom", child of "FuselageGeom"
  location (X Y Z) 50 -93 20, rotation 0 0 0
  bounding box size 24 21.4853 21.4853
  Design: Length=24
  cross sections:
    n  XLocPercent  YLocPercent  ZLocPercent  shape
    0  0            0            0            circle Circle_Diameter=13
    1  1            0            0            as above

Fuselage "FuselageGeom", child of "FuselageGeom"
  location (X Y Z) 50 -76 20, rotation 0 0 0
  bounding box size 24 21.4853 21.4853
  Design: Length=24
  cross sections:
    n  XLocPercent  YLocPercent  ZLocPercent  shape
    0  0            0            0            circle Circle_Diameter=13
    1  1            0            0            as above

Fuselage "FuselageGeom", child of "FuselageGeom"
  location (X Y Z) 50 -59 20, rotation 0 0 0
  bounding box size 24 21.4853 21.4853
  Design: Length=24
  cross sections:
    n  XLocPercent  YLocPercent  ZLocPercent  shape
    0  0            0            0            circle Circle_Diameter=13
    1  1            0            0            as above

Fuselage "FuselageGeom", child of "FuselageGeom"
  location (X Y Z) 50 -101.5 34, rotation 0 0 0
  bounding box size 24 21.4853 21.4853
  Design: Length=24
  cross sections:
    n  XLocPercent  YLocPercent  ZLocPercent  shape
    0  0            0            0            circle Circle_Diameter=13
    1  1            0            0            as above

Fuselage "FuselageGeom", child of "FuselageGeom"
  location (X Y Z) 50 -84.5 34, rotation 0 0 0
  bounding box size 24 21.4853 21.4853
  Design: Length=24
  cross sections:
    n  XLocPercent  YLocPercent  ZLocPercent  shape
    0  0            0            0            circle Circle_Diameter=13
    1  1            0            0            as above

Fuselage "FuselageGeom", child of "FuselageGeom"
  location (X Y Z) 50 -67.5 34, rotation 0 0 0
  bounding box size 24 21.4853 21.4853
  Design: Length=24
  cross sections:
    n  XLocPercent  YLocPercent  ZLocPercent  shape
    0  0            0            0            circle Circle_Diameter=13
    1  1            0            0            as above

Fuselage "FuselageGeom", child of "FuselageGeom"
  location (X Y Z) 50 -118 34, rotation 0 0 0
  bounding box size 24 21.4853 21.4853
  Design: Length=24
  cross sections:
    n  XLocPercent  YLocPercent  ZLocPercent  shape
    0  0            0            0            circle Circle_Diameter=13
    1  1            0            0            as above

Fuselage "floaty"
  location (X Y Z) 30.42 30.42 0, rotation 0 0 0
  symmetric about XZ
  bounding box size 179 85.84 52.9029
  Design: Length=179
  cross sections:
    n  XLocPercent  YLocPercent  ZLocPercent  shape
    0  0            0            0            point
    1  0.15         0            0            edit curve Width=25 Height=100 AbsoluteFlag=0 SymType=0 cubic Bezier points (X Y): 0.5 0, 0.465 -0.1, 0.395 -0.3, 0.36 -0.45, 0.27 -0.4625, 0.1 -0.4875, 0 -0.5, -0.1 -0.4875, -0.27 -0.4625, -0.36 -0.45, -0.395 -0.3, -0.465 -0.1, -0.5 0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
    2  0.55         0            0            edit curve Width=25 Height=90 AbsoluteFlag=0 SymType=0 cubic Bezier points (X Y): 0.5 0, 0.465 -0.1, 0.395 -0.3, 0.36 -0.45, 0.27 -0.4625, 0.1 -0.4875, 0 -0.5, -0.1 -0.4875, -0.27 -0.4625, -0.36 -0.45, -0.395 -0.3, -0.465 -0.1, -0.5 0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
    3  0.8499       0            0            edit curve Width=25 Height=80 AbsoluteFlag=0 SymType=0 cubic Bezier points (X Y): 0.5 0, 0.465 -0.1, 0.395 -0.3, 0.36 -0.45, 0.27 -0.4625, 0.1 -0.4875, 0 -0.5, -0.1 -0.4875, -0.27 -0.4625, -0.36 -0.45, -0.395 -0.3, -0.465 -0.1, -0.5 0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
    4  0.85         0            0            edit curve Width=25 Height=10 AbsoluteFlag=0 SymType=0 linear points (X Y): 0.5 0, 0.2 -0.5, 0 -0.5, -0.2 -0.5, -0.5 0, 0.5 0
    5  1            0            0            point

Custom "Box", child of "floaty"
  location (X Y Z) -10 0 -25, rotation 0 0 0
  bounding box size 5 7 50
  Design: Height=50 Length=5 SquareFlag=0 Width=7
  custom script Box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

Fuselage "backup", child of "floaty"
  location (X Y Z) 0 0 0, rotation 0 0 0
  bounding box size 179 25 52.2148
  Design: Length=179
  cross sections:
    n  XLocPercent  YLocPercent  ZLocPercent  shape
    0  0            0            0            point
    1  0.27933      0            0            edit curve Width=25 Height=100 AbsoluteFlag=0 SymType=0 cubic Bezier points (X Y): 0.1 -0.5, 0.05 -0.51, -0.05 -0.51, -0.1 -0.5, -0.35 -0.35, -0.05 -0.05, -0.5 0, -0.35 0, 0.35 0, 0.5 0, 0.05 -0.05, 0.35 -0.35, 0.1 -0.5
    2  0.55         0            0            as above
    3  0.8499       0            0            edit curve Width=25 Height=40 AbsoluteFlag=0 SymType=0 cubic Bezier points (X Y): 0.5 0, 0.15 -0.05, 0.2 -0.4, 0 -0.5, -0.2 -0.4, -0.15 -0.05, -0.5 0, -0.35 0, -0.15 0, 0 0, 0.15 0, 0.35 0, 0.5 0
    4  0.85         0            0            edit curve Width=20 Height=8 AbsoluteFlag=0 SymType=0 cubic Bezier points (X Y): 0.5 0, 0.15 -0.2, 0.275958 -0.5, 0 -0.5, -0.275958 -0.5, -0.15 -0.2, -0.5 0, -0.35 0, -0.15 0, 0 0, 0.15 0, 0.35 0, 0.5 0
    5  1            0            0            point

Fuselage "floaty"
  location (X Y Z) 30.42 30.42 0, rotation 0 0 0
  symmetric about XZ
  bounding box size 153 85.84 52.8578
  Design: Length=153
  cross sections:
    n  XLocPercent  YLocPercent  ZLocPercent  shape
    0  0            0            0            point
    1  0.2          0            0            edit curve Width=25 Height=100 AbsoluteFlag=0 SymType=0 cubic Bezier points (X Y): 0.5 0, 0.465 -0.1, 0.395 -0.3, 0.36 -0.45, 0.27 -0.4625, 0.1 -0.4875, 0 -0.5, -0.1 -0.4875, -0.27 -0.4625, -0.36 -0.45, -0.395 -0.3, -0.465 -0.1, -0.5 0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
    2  0.55         0            0            edit curve Width=25 Height=90 AbsoluteFlag=0 SymType=0 cubic Bezier points (X Y): 0.5 0, 0.465 -0.1, 0.395 -0.3, 0.36 -0.45, 0.27 -0.4625, 0.1 -0.4875, 0 -0.5, -0.1 -0.4875, -0.27 -0.4625, -0.36 -0.45, -0.395 -0.3, -0.465 -0.1, -0.5 0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
    3  1            0            0            edit curve Width=25 Height=80 AbsoluteFlag=0 SymType=0 cubic Bezier points (X Y): 0.5 0, 0.465 -0.1, 0.395 -0.3, 0.36 -0.45, 0.27 -0.4625, 0.1 -0.4875, 0 -0.5, -0.1 -0.4875, -0.27 -0.4625, -0.36 -0.45, -0.395 -0.3, -0.465 -0.1, -0.5 0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

Fuselage "FuselageGeom", child of "floaty"
  location (X Y Z) 183.421 30.42 0, rotation 0 0 0
  symmetric about XZ
  bounding box size 30 85.84 30
  Design: Length=30
  cross sections:
    n  XLocPercent  YLocPercent  ZLocPercent  shape
    0  0            0            0            edit curve Width=25 Height=100 AbsoluteFlag=0 SymType=0 linear points (X Y): 0.5 0, 0.395 -0.3, 0 -0.3, -0.395 -0.3, -0.5 0, 0.5 0
    1  0.25         0            0            as above
    2  0.5          0            0            as above
    3  0.75         0            0            as above
    4  1            0            0            as above

Fuselage "floaty"
  location (X Y Z) 30.42 30.42 0, rotation 0 0 0
  symmetric about XZ
  bounding box size 160.332 87.5067 64.8351
  Design: Length=147
  cross sections:
    n  XLocPercent  YLocPercent  ZLocPercent  shape
    0  0            0            0            point
    1  0.2          0            0            edit curve Width=25 Height=100 AbsoluteFlag=0 SymType=0 cubic Bezier points (X Y): 0.5 0, 0.465 -0.1, 0.395 -0.3, 0.36 -0.45, 0.27 -0.4625, 0.1 -0.4875, 0 -0.5, -0.1 -0.4875, -0.27 -0.4625, -0.36 -0.45, -0.395 -0.3, -0.465 -0.1, -0.5 0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
    2  0.55         0            0            edit curve Width=25 Height=90 AbsoluteFlag=0 SymType=0 cubic Bezier points (X Y): 0.5 0, 0.465 -0.1, 0.395 -0.3, 0.36 -0.45, 0.27 -0.4625, 0.1 -0.4875, 0 -0.5, -0.1 -0.4875, -0.27 -0.4625, -0.36 -0.45, -0.395 -0.3, -0.465 -0.1, -0.5 0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
    3  0.99999      0            0            edit curve Width=25 Height=80 AbsoluteFlag=0 SymType=0 cubic Bezier points (X Y): 0.5 0, 0.465 -0.1, 0.395 -0.3, 0.36 -0.45, 0.27 -0.4625, 0.1 -0.4875, 0 -0.5, -0.1 -0.4875, -0.27 -0.4625, -0.36 -0.45, -0.395 -0.3, -0.465 -0.1, -0.5 0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
    4  1            0            0            point

Fuselage "FuselageGeom", child of "floaty"
  location (X Y Z) 183.421 30.42 0, rotation 0 0 0
  symmetric about XZ
  bounding box size 30 85.84 30
  Design: Length=30
  cross sections:
    n  XLocPercent  YLocPercent  ZLocPercent  shape
    0  0            0            0            edit curve Width=25 Height=100 AbsoluteFlag=0 SymType=0 linear points (X Y): 0.5 0, 0.395 -0.3, 0 -0.3, -0.395 -0.3, -0.5 0, 0.5 0
    1  0.25         0            0            as above
    2  0.5          0            0            as above
    3  0.75         0            0            as above
    4  1            0            0            as above

Fuselage "floaty2"
  location (X Y Z) 30.42 30.42 0, rotation 0 0 0
  symmetric about XZ
  bounding box size 181.394 95.84 38.1212
  Design: Length=179
  cross sections:
    n  XLocPercent  YLocPercent  ZLocPercent  shape
    0  0            0            0            point
    1  0.2          0            0            edit curve Width=35 Height=70 AbsoluteFlag=0 SymType=0 cubic Bezier points (X Y): 0.5 0, 0.465 -0.1, 0.395 -0.3, 0.36 -0.45, 0.27 -0.4625, 0.1 -0.4875, 0 -0.5, -0.1 -0.4875, -0.27 -0.4625, -0.36 -0.45, -0.395 -0.3, -0.465 -0.1, -0.5 0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
    2  0.55         0            0            edit curve Width=30 Height=60 AbsoluteFlag=0 SymType=0 cubic Bezier points (X Y): 0.5 0, 0.465 -0.1, 0.395 -0.3, 0.36 -0.45, 0.27 -0.4625, 0.1 -0.4875, 0 -0.5, -0.1 -0.4875, -0.27 -0.4625, -0.36 -0.45, -0.395 -0.3, -0.465 -0.1, -0.5 0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
    3  0.855        0            0            edit curve Width=25 Height=50 AbsoluteFlag=0 SymType=0 cubic Bezier points (X Y): 0.5 0, 0.465 -0.1, 0.395 -0.3, 0.36 -0.45, 0.27 -0.4625, 0.1 -0.4875, 0 -0.5, -0.1 -0.4875, -0.27 -0.4625, -0.36 -0.45, -0.395 -0.3, -0.465 -0.1, -0.5 0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
    4  0.86         0            0            edit curve Width=25 Height=40 AbsoluteFlag=0 SymType=0 cubic Bezier points (X Y): 0.5 0, 0.465 -0.1, 0.395 -0.3, 0.36 -0.45, 0.27 -0.4625, 0.1 -0.4875, 0 -0.5, -0.1 -0.4875, -0.27 -0.4625, -0.36 -0.45, -0.395 -0.3, -0.465 -0.1, -0.5 0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
    5  0.985        0            0            edit curve Width=10 Height=40 AbsoluteFlag=0 SymType=0 cubic Bezier points (X Y): 0.5 0, 0.465 -0.1, 0.395 -0.3, 0.36 -0.45, 0.27 -0.4625, 0.1 -0.4875, 0 -0.5, -0.1 -0.4875, -0.27 -0.4625, -0.36 -0.45, -0.395 -0.3, -0.465 -0.1, -0.5 0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
    6  0.999997     0            0            edit curve Width=5 Height=10 AbsoluteFlag=0 SymType=0 cubic Bezier points (X Y): 0.5 0, 0.465 -0.1, 0.395 -0.3, 0.36 -0.45, 0.27 -0.4625, 0.1 -0.4875, 0 -0.5, -0.1 -0.4875, -0.27 -0.4625, -0.36 -0.45, -0.395 -0.3, -0.465 -0.1, -0.5 0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
    7  1            0            0            edit curve Width=0 Height=0 AbsoluteFlag=0 SymType=0 cubic Bezier points (X Y): 0 0, 0 0, 0 0, 0 0, 0 0, 0 0, 0 0

Fuselage "GOOD FLOATY"
  location (X Y Z) 30.42 30.42 0, rotation 0 0 0
  symmetric about XZ
  bounding box size 180.577 90.84 35.2256
  Design: Length=179
  cross sections:
    n  XLocPercent  YLocPercent  ZLocPercent  shape
    0  0            0            0            point
    1  0.2          0            0            edit curve Width=30 Height=65 AbsoluteFlag=0 SymType=0 cubic Bezier points (X Y): 0.5 0, 0.465 -0.1, 0.395 -0.3, 0.36 -0.45, 0.27 -0.4625, 0.1 -0.4875, 0 -0.5, -0.1 -0.4875, -0.27 -0.4625, -0.36 -0.45, -0.395 -0.3, -0.465 -0.1, -0.5 0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
    2  0.55         0            0            edit curve Width=27.5 Height=52.5 AbsoluteFlag=0 SymType=0 cubic Bezier points (X Y): 0.5 0, 0.465 -0.1, 0.395 -0.3, 0.36 -0.45, 0.27 -0.4625, 0.1 -0.4875, 0 -0.5, -0.1 -0.4875, -0.27 -0.4625, -0.36 -0.45, -0.395 -0.3, -0.465 -0.1, -0.5 0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
    3  0.855        0            0            edit curve Width=25 Height=40 AbsoluteFlag=0 SymType=0 cubic Bezier points (X Y): 0.5 0, 0.465 -0.1, 0.395 -0.3, 0.36 -0.45, 0.27 -0.4625, 0.1 -0.4875, 0 -0.5, -0.1 -0.4875, -0.27 -0.4625, -0.36 -0.45, -0.395 -0.3, -0.465 -0.1, -0.5 0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
    4  0.86         0            0            edit curve Width=25 Height=30 AbsoluteFlag=0 SymType=0 cubic Bezier points (X Y): 0.5 0, 0.465 -0.1, 0.395 -0.3, 0.36 -0.45, 0.27 -0.4625, 0.1 -0.4875, 0 -0.5, -0.1 -0.4875, -0.27 -0.4625, -0.36 -0.45, -0.395 -0.3, -0.465 -0.1, -0.5 0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
    5  0.985        0            0            edit curve Width=10 Height=30 AbsoluteFlag=0 SymType=0 cubic Bezier points (X Y): 0.5 0, 0.465 -0.1, 0.395 -0.3, 0.36 -0.45, 0.27 -0.4625, 0.1 -0.4875, 0 -0.5, -0.1 -0.4875, -0.27 -0.4625, -0.36 -0.45, -0.395 -0.3, -0.465 -0.1, -0.5 0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
    6  0.999997     0            0            edit curve Width=5 Height=5 AbsoluteFlag=0 SymType=0 cubic Bezier points (X Y): 0.5 0, 0.465 -0.1, 0.395 -0.3, 0.36 -0.45, 0.27 -0.4625, 0.1 -0.4875, 0 -0.5, -0.1 -0.4875, -0.27 -0.4625, -0.36 -0.45, -0.395 -0.3, -0.465 -0.1, -0.5 0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
    7  1            0            0            edit curve Width=0 Height=0 AbsoluteFlag=0 SymType=0 cubic Bezier points (X Y): 0 0, 0 0, 0 0, 0 0, 0 0, 0 0, 0 0

VSPAERO settings: Sref=43000 bref=495.929 cref=149.592 Xcg=109.585 Ycg=0 Zcg=6.29294 AlphaStart=2 AlphaEnd=6 AlphaNpts=1 BetaStart=0 BetaEnd=0 BetaNpts=1 MachStart=0.7 MachEnd=0 MachNpts=1 ReCref=1.8e+09 Vinf=100 Rho=0.002377
  control group "Fuselage Elevators": DeflectionAngle=3
  control group "Wing Inboard": DeflectionAngle=0
  control group "Wing Outboard": DeflectionAngle=0
  control group "Ailerons": DeflectionAngle=0
