OpenVSP model (file version 5), 18 components.
Geometry view with OpenVSP parameter names; values to 6 digits, angles in degrees, lengths in the model's unit.
Overall bounding box: X_Min=-0.0863418 X_Len=77.8113 Y_Min=-75.9002 Y_Len=151.8 Z_Min=-2.41399 Z_Len=20.9525

Wing "winggeom"
  location (X Y Z) 0 0 0, rotation 0 0 0
  symmetric about XZ
  bounding box size 69.1731 151.8 8.03126
  totals: TotalSpan=150.872 TotalProjectedSpan=150.872 TotalChord=46.636 TotalArea=4010.68 TotalAR=5.67544
  root: chord 64.4249, twist 0, airfoil file "winggeom_airfoil_XSec_0.dat"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 BaseThickChord=0.135952 ThickChord=0.12
  sections:
    n  Span     Root_Chord  Tip_Chord  Area     Sweep    Sweep_Location  Dihedral  Twist  Twist_Location  tip airfoil
    1  5.85201  64.4249     58.8227    360.623  37.2593  0.25            0         0      0.25            as above
    2  3.27585  58.8227     59.8231    194.333  47.1058  0.25            0         0      0.25            airfoil file "winggeom_airfoil_XSec_1.dat"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 BaseThickChord=0.135952 ThickChord=0.12
    3  2.90295  59.8231     49.6534    158.902  7.07932  0.25            0         0      0.25            airfoil file "winggeom_airfoil_XSec_2.dat"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 BaseThickChord=0.150561 ThickChord=0.12
    4  5.87006  49.6534     28.4073    229.11   5.43538  0.25            0         0      0.25            airfoil file "winggeom_airfoil_XSec_3.dat"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 BaseThickChord=0.142502 ThickChord=0.12
    5  57.5351  28.4073     8.52218    1062.37  26.1485  0.25            0         0      0.25            airfoil file "winggeom_airfoil_XSec_4.dat"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 BaseThickChord=0.135952 ThickChord=0.12
  SS_Control "SS_CONT_0": UStart=0.857143 UEnd=0.2 Length_C_Start=0.141933 Length_C_End=0.141933 Length_Start=1.20958 Length_End=8.82595 LE_Flag=0 Surf_Type=2
  SS_Control "SS_CONT_1": UStart=0.67 UEnd=0.74 Length_C_Start=0.25 Length_C_End=0.25 Length_Start=8.74855 Length_End=6.20707 LE_Flag=0 Surf_Type=2
  SS_Control "SS_CONT_2": UStart=0.74 UEnd=0.79 Length_C_Start=0.25 Length_C_End=0.25 Length_Start=6.20707 Length_End=4.46708 LE_Flag=0 Surf_Type=2
  SS_Control "SS_CONT_3": UStart=0.79 UEnd=0.825 Length_C_Start=0.25 Length_C_End=0.25 Length_Start=4.46708 Length_End=3.24909 LE_Flag=0 Surf_Type=2

Wing "winggeom2"
  location (X Y Z) 51.816 9.144 0, rotation 90 0 0
  symmetric about XZ
  bounding box size 25.9085 32.3825 18.5385
  totals: TotalSpan=38.9234 TotalProjectedSpan=36.576 TotalChord=12.192 TotalArea=474.554 TotalAR=2.81908
  root: chord 17.4171, twist -1, NACA 4-series Camber=0 CamberLoc=0.2 ThickChord=0.1
  sections:
    n  Span     Root_Chord  Tip_Chord  Area     Sweep  Sweep_Location  Dihedral  Twist  Twist_Location  tip airfoil
    1  19.4617  17.4171     6.96686    237.277  40     0.25            -20       -1     0.25            as above

Fuselage "FuselageGeom_1"
  location (X Y Z) 15.24 18.288 5.334, rotation 0 0 0
  bounding box size 7.3152 3.9624 3.9624
  Design: Length=7.3152
  cross sections:
    n  XLocPercent  YLocPercent  ZLocPercent  shape
    0  0            0            0            point
    1  1            0            0            ellipse Ellipse_Height=3.9624 Ellipse_Width=3.9624
    2  1            0            0            point

Fuselage "FuselageGeom_11"
  location (X Y Z) 15.24 23.4696 5.4864, rotation 0 0 0
  bounding box size 7.3152 3.9624 3.9624
  Design: Length=7.3152
  cross sections:
    n  XLocPercent  YLocPercent  ZLocPercent  shape
    0  0            0            0            point
    1  1            0            0            ellipse Ellipse_Height=3.9624 Ellipse_Width=3.9624
    2  1            0            0            point

Fuselage "fuselagegeom_111"
  location (X Y Z) 15.24 28.6512 5.4864, rotation 0 0 0
  bounding box size 7.3152 3.9624 3.9624
  Design: Length=7.3152
  cross sections:
    n  XLocPercent  YLocPercent  ZLocPercent  shape
    0  0            0            0            point
    1  1            0            0            ellipse Ellipse_Height=3.9624 Ellipse_Width=3.9624
    2  1            0            0            point

Fuselage "fuselagegeom_11963"
  location (X Y Z) 15.24 33.8328 5.4864, rotation 0 0 0
  bounding box size 7.3152 3.9624 3.9624
  Design: Length=7.3152
  cross sections:
    n  XLocPercent  YLocPercent  ZLocPercent  shape
    0  0            0            0            point
    1  1            0            0            ellipse Ellipse_Height=3.9624 Ellipse_Width=3.9624
    2  1            0            0            point

Fuselage "fuselagegeom_11363"
  location (X Y Z) 15.24 20.8788 9.7536, rotation 0 0 0
  bounding box size 7.3152 3.9624 3.9624
  Design: Length=7.3152
  cross sections:
    n  XLocPercent  YLocPercent  ZLocPercent  shape
    0  0            0            0            point
    1  1            0            0            ellipse Ellipse_Height=3.9624 Ellipse_Width=3.9624
    2  1            0            0            point

Fuselage "fuselagegeom_11549"
  location (X Y Z) 15.24 26.0604 9.7536, rotation 0 0 0
  bounding box size 7.3152 3.9624 3.9624
  Design: Length=7.3152
  cross sections:
    n  XLocPercent  YLocPercent  ZLocPercent  shape
    0  0            0            0            point
    1  1            0            0            ellipse Ellipse_Height=3.9624 Ellipse_Width=3.9624
    2  1            0            0            point

Fuselage "fuselagegeom_11668"
  location (X Y Z) 15.24 31.242 9.7536, rotation 0 0 0
  bounding box size 7.3152 3.9624 3.9624
  Design: Length=7.3152
  cross sections:
    n  XLocPercent  YLocPercent  ZLocPercent  shape
    0  0            0            0            point
    1  1            0            0            ellipse Ellipse_Height=3.9624 Ellipse_Width=3.9624
    2  1            0            0            point

Fuselage "fuselagegeom_11582"
  location (X Y Z) 15.24 25.908 1.524, rotation 0 0 0
  bounding box size 7.3152 2.59528 2.59528
  Design: Length=7.3152
  cross sections:
    n  XLocPercent  YLocPercent  ZLocPercent  shape
    0  0            0            0            point
    1  1            0            0            ellipse Ellipse_Height=1.2192 Ellipse_Width=1.2192
    2  1            0            0            point

Fuselage "fuselagegeom_11492"
  location (X Y Z) 15.24 -33.528 5.4864, rotation 0 0 0
  bounding box size 7.3152 3.9624 3.9624
  Design: Length=7.3152
  cross sections:
    n  XLocPercent  YLocPercent  ZLocPercent  shape
    0  0            0            0            point
    1  1            0            0            ellipse Ellipse_Height=3.9624 Ellipse_Width=3.9624
    2  1            0            0            point

Fuselage "fuselagegeom_112"
  location (X Y Z) 15.24 -28.3464 5.4864, rotation 0 0 0
  bounding box size 7.3152 3.9624 3.9624
  Design: Length=7.3152
  cross sections:
    n  XLocPercent  YLocPercent  ZLocPercent  shape
    0  0            0            0            point
    1  1            0            0            ellipse Ellipse_Height=3.9624 Ellipse_Width=3.9624
    2  1            0            0            point

Fuselage "fuselagegeom_11320"
  location (X Y Z) 15.24 -23.1648 5.4864, rotation 0 0 0
  bounding box size 7.3152 3.9624 3.9624
  Design: Length=7.3152
  cross sections:
    n  XLocPercent  YLocPercent  ZLocPercent  shape
    0  0            0            0            point
    1  1            0            0            ellipse Ellipse_Height=3.9624 Ellipse_Width=3.9624
    2  1            0            0            point

Fuselage "fuselagegeom_11867"
  location (X Y Z) 15.24 -17.9832 5.4864, rotation 0 0 0
  bounding box size 7.3152 3.9624 3.9624
  Design: Length=7.3152
  cross sections:
    n  XLocPercent  YLocPercent  ZLocPercent  shape
    0  0            0            0            point
    1  1            0            0            ellipse Ellipse_Height=3.9624 Ellipse_Width=3.9624
    2  1            0            0            point

Fuselage "fuselagegeom_11141"
  location (X Y Z) 15.24 -30.9372 9.7536, rotation 0 0 0
  bounding box size 7.3152 3.9624 3.9624
  Design: Length=7.3152
  cross sections:
    n  XLocPercent  YLocPercent  ZLocPercent  shape
    0  0            0            0            point
    1  1            0            0            ellipse Ellipse_Height=3.9624 Ellipse_Width=3.9624
    2  1            0            0            point

Fuselage "fuselagegeom_11613"
  location (X Y Z) 15.24 -25.7556 9.7536, rotation 0 0 0
  bounding box size 7.3152 3.9624 3.9624
  Design: Length=7.3152
  cross sections:
    n  XLocPercent  YLocPercent  ZLocPercent  shape
    0  0            0            0            point
    1  1            0            0            ellipse Ellipse_Height=3.9624 Ellipse_Width=3.9624
    2  1            0            0            point

Fuselage "fuselagegeom_11839"
  location (X Y Z) 15.24 -20.574 9.7536, rotation 0 0 0
  bounding box size 7.3152 3.9624 3.9624
  Design: Length=7.3152
  cross sections:
    n  XLocPercent  YLocPercent  ZLocPercent  shape
    0  0            0            0            point
    1  1            0            0            ellipse Ellipse_Height=3.9624 Ellipse_Width=3.9624
    2  1            0            0            point

Fuselage "fuselagegeom_11632"
  location (X Y Z) 15.24 -25.908 1.524, rotation 0 0 0
  bounding box size 7.3152 2.59528 2.59528
  Design: Length=7.3152
  cross sections:
    n  XLocPercent  YLocPercent  ZLocPercent  shape
    0  0            0            0            point
    1  1            0            0            ellipse Ellipse_Height=1.2192 Ellipse_Width=1.2192
    2  1            0            0            point
