OpenVSP model (file version 5), 22 components.
Geometry view with OpenVSP parameter names; values to 6 digits, angles in degrees, lengths in the model's unit.
Overall bounding box: X_Min=0 X_Len=74.1284 Y_Min=-76.0342 Y_Len=152.068 Z_Min=-3.86725 Z_Len=21.3201

Wing "main_wing"
  location (X Y Z) 0 0 0, rotation 0 0 0
  symmetric about XZ
  bounding box size 64.7263 152.068 7.7345
  totals: TotalSpan=151.16 TotalProjectedSpan=151.16 TotalChord=45.5951 TotalArea=3994.44 TotalAR=5.72028
  root: chord 64.425, twist 0, NACA 4-series Camber=0 CamberLoc=0.2 ThickChord=0.12
  sections:
    n  Span     Root_Chord  Tip_Chord  Area     Sweep    Sweep_Location  Dihedral  Twist  Twist_Location  tip airfoil
    1  5.84989  64.425      58.82      360.485  37.6     0.25            0         0      0.25            as above
    2  3.41622  58.82       54.6212    193.77   34.7262  0.25            0         0      0.25            as above
    3  2.90227  54.6212     49.6536    151.317  29.7695  0.25            0         0      0.25            as above
    4  5.87257  49.6536     28.4074    229.209  5.4388   0.25            0         0      0.25            as above
    5  57.5391  28.4074     8.522      1062.44  26.1485  0.25            0         0      0.25            as above
  SS_Control "SS_CONT_0": UStart=0 UEnd=0.27 Length_C_Start=0.15 Length_C_End=0.15 Length_Start=9.66375 Length_End=8.91549 LE_Flag=0 Surf_Type=2

Wing "stabilizer"
  location (X Y Z) 51.816 9.144 0, rotation 90 0 0
  symmetric about XZ
  bounding box size 22.3124 31.594 17.4528
  totals: TotalSpan=36.576 TotalProjectedSpan=34.3702 TotalChord=12.192 TotalArea=445.935 TotalAR=2.64907
  root: chord 17.417, twist 0, NACA 4-series Camber=0 CamberLoc=0.2 ThickChord=0.1
  sections:
    n  Span    Root_Chord  Tip_Chord  Area     Sweep    Sweep_Location  Dihedral  Twist  Twist_Location  tip airfoil
    1  18.288  17.417      6.967      222.967  34.8473  0.25            -20       0      0.25            as above

BodyOfRevolution "Turbofan_0"
  location (X Y Z) 15.24 18.288 6.096, rotation 0 0 0
  bounding box size 7.3152 4.16052 4.16052
  Design: A0=11.1289 Ae=11.1289 Amin=8.90932 AminW=0.25 Angle=0 Diameter=3.76428 Mode=0
  profile: super ellipse Super_Height=0.39624 Super_M=2 Super_MaxWidthLoc=0 Super_N=1 Super_Width=7.3152

BodyOfRevolution "Turbofan_0_mirror"
  location (X Y Z) 15.24 -18.288 6.096, rotation 0 0 0
  bounding box size 7.3152 4.16052 4.16052
  Design: A0=11.1289 Ae=11.1289 Amin=8.90932 AminW=0.25 Angle=0 Diameter=3.76428 Mode=0
  profile: super ellipse Super_Height=0.39624 Super_M=2 Super_MaxWidthLoc=0 Super_N=1 Super_Width=7.3152

BodyOfRevolution "Turbofan_1"
  location (X Y Z) 15.24 23.4696 6.096, rotation 0 0 0
  bounding box size 7.3152 4.16052 4.16052
  Design: A0=11.1289 Ae=11.1289 Amin=8.90932 AminW=0.25 Angle=0 Diameter=3.76428 Mode=0
  profile: super ellipse Super_Height=0.39624 Super_M=2 Super_MaxWidthLoc=0 Super_N=1 Super_Width=7.3152

BodyOfRevolution "Turbofan_1_mirror"
  location (X Y Z) 15.24 -23.4696 6.096, rotation 0 0 0
  bounding box size 7.3152 4.16052 4.16052
  Design: A0=11.1289 Ae=11.1289 Amin=8.90932 AminW=0.25 Angle=0 Diameter=3.76428 Mode=0
  profile: super ellipse Super_Height=0.39624 Super_M=2 Super_MaxWidthLoc=0 Super_N=1 Super_Width=7.3152

BodyOfRevolution "Turbofan_2"
  location (X Y Z) 15.24 28.6512 6.096, rotation 0 0 0
  bounding box size 7.3152 4.16052 4.16052
  Design: A0=11.1289 Ae=11.1289 Amin=8.90932 AminW=0.25 Angle=0 Diameter=3.76428 Mode=0
  profile: super ellipse Super_Height=0.39624 Super_M=2 Super_MaxWidthLoc=0 Super_N=1 Super_Width=7.3152

BodyOfRevolution "Turbofan_2_mirror"
  location (X Y Z) 15.24 -28.6512 6.096, rotation 0 0 0
  bounding box size 7.3152 4.16052 4.16052
  Design: A0=11.1289 Ae=11.1289 Amin=8.90932 AminW=0.25 Angle=0 Diameter=3.76428 Mode=0
  profile: super ellipse Super_Height=0.39624 Super_M=2 Super_MaxWidthLoc=0 Super_N=1 Super_Width=7.3152

BodyOfRevolution "Turbofan_3"
  location (X Y Z) 15.24 33.8328 6.096, rotation 0 0 0
  bounding box size 7.3152 4.16052 4.16052
  Design: A0=11.1289 Ae=11.1289 Amin=8.90932 AminW=0.25 Angle=0 Diameter=3.76428 Mode=0
  profile: super ellipse Super_Height=0.39624 Super_M=2 Super_MaxWidthLoc=0 Super_N=1 Super_Width=7.3152

BodyOfRevolution "Turbofan_3_mirror"
  location (X Y Z) 15.24 -33.8328 6.096, rotation 0 0 0
  bounding box size 7.3152 4.16052 4.16052
  Design: A0=11.1289 Ae=11.1289 Amin=8.90932 AminW=0.25 Angle=0 Diameter=3.76428 Mode=0
  profile: super ellipse Super_Height=0.39624 Super_M=2 Super_MaxWidthLoc=0 Super_N=1 Super_Width=7.3152

BodyOfRevolution "Turbofan_4"
  location (X Y Z) 15.24 39.0144 6.096, rotation 0 0 0
  bounding box size 7.3152 4.16052 4.16052
  Design: A0=11.1289 Ae=11.1289 Amin=8.90932 AminW=0.25 Angle=0 Diameter=3.76428 Mode=0
  profile: super ellipse Super_Height=0.39624 Super_M=2 Super_MaxWidthLoc=0 Super_N=1 Super_Width=7.3152

BodyOfRevolution "Turbofan_4_mirror"
  location (X Y Z) 15.24 -39.0144 6.096, rotation 0 0 0
  bounding box size 7.3152 4.16052 4.16052
  Design: A0=11.1289 Ae=11.1289 Amin=8.90932 AminW=0.25 Angle=0 Diameter=3.76428 Mode=0
  profile: super ellipse Super_Height=0.39624 Super_M=2 Super_MaxWidthLoc=0 Super_N=1 Super_Width=7.3152

BodyOfRevolution "Turbofan_5"
  location (X Y Z) 15.24 20.8788 10.3632, rotation 0 0 0
  bounding box size 7.3152 4.16052 4.16052
  Design: A0=11.1289 Ae=11.1289 Amin=8.90932 AminW=0.25 Angle=0 Diameter=3.76428 Mode=0
  profile: super ellipse Super_Height=0.39624 Super_M=2 Super_MaxWidthLoc=0 Super_N=1 Super_Width=7.3152

BodyOfRevolution "Turbofan_5_mirror"
  location (X Y Z) 15.24 -20.8788 10.3632, rotation 0 0 0
  bounding box size 7.3152 4.16052 4.16052
  Design: A0=11.1289 Ae=11.1289 Amin=8.90932 AminW=0.25 Angle=0 Diameter=3.76428 Mode=0
  profile: super ellipse Super_Height=0.39624 Super_M=2 Super_MaxWidthLoc=0 Super_N=1 Super_Width=7.3152

BodyOfRevolution "Turbofan_6"
  location (X Y Z) 15.24 26.0604 10.3632, rotation 0 0 0
  bounding box size 7.3152 4.16052 4.16052
  Design: A0=11.1289 Ae=11.1289 Amin=8.90932 AminW=0.25 Angle=0 Diameter=3.76428 Mode=0
  profile: super ellipse Super_Height=0.39624 Super_M=2 Super_MaxWidthLoc=0 Super_N=1 Super_Width=7.3152

BodyOfRevolution "Turbofan_6_mirror"
  location (X Y Z) 15.24 -26.0604 10.3632, rotation 0 0 0
  bounding box size 7.3152 4.16052 4.16052
  Design: A0=11.1289 Ae=11.1289 Amin=8.90932 AminW=0.25 Angle=0 Diameter=3.76428 Mode=0
  profile: super ellipse Super_Height=0.39624 Super_M=2 Super_MaxWidthLoc=0 Super_N=1 Super_Width=7.3152

BodyOfRevolution "Turbofan_7"
  location (X Y Z) 15.24 31.242 10.3632, rotation 0 0 0
  bounding box size 7.3152 4.16052 4.16052
  Design: A0=11.1289 Ae=11.1289 Amin=8.90932 AminW=0.25 Angle=0 Diameter=3.76428 Mode=0
  profile: super ellipse Super_Height=0.39624 Super_M=2 Super_MaxWidthLoc=0 Super_N=1 Super_Width=7.3152

BodyOfRevolution "Turbofan_7_mirror"
  location (X Y Z) 15.24 -31.242 10.3632, rotation 0 0 0
  bounding box size 7.3152 4.16052 4.16052
  Design: A0=11.1289 Ae=11.1289 Amin=8.90932 AminW=0.25 Angle=0 Diameter=3.76428 Mode=0
  profile: super ellipse Super_Height=0.39624 Super_M=2 Super_MaxWidthLoc=0 Super_N=1 Super_Width=7.3152

BodyOfRevolution "Turbofan_8"
  location (X Y Z) 15.24 36.4236 10.3632, rotation 0 0 0
  bounding box size 7.3152 4.16052 4.16052
  Design: A0=11.1289 Ae=11.1289 Amin=8.90932 AminW=0.25 Angle=0 Diameter=3.76428 Mode=0
  profile: super ellipse Super_Height=0.39624 Super_M=2 Super_MaxWidthLoc=0 Super_N=1 Super_Width=7.3152

BodyOfRevolution "Turbofan_8_mirror"
  location (X Y Z) 15.24 -36.4236 10.3632, rotation 0 0 0
  bounding box size 7.3152 4.16052 4.16052
  Design: A0=11.1289 Ae=11.1289 Amin=8.90932 AminW=0.25 Angle=0 Diameter=3.76428 Mode=0
  profile: super ellipse Super_Height=0.39624 Super_M=2 Super_MaxWidthLoc=0 Super_N=1 Super_Width=7.3152

BodyOfRevolution "Turbofan_9"
  location (X Y Z) 15.24 41.6052 10.3632, rotation 0 0 0
  bounding box size 7.3152 4.16052 4.16052
  Design: A0=11.1289 Ae=11.1289 Amin=8.90932 AminW=0.25 Angle=0 Diameter=3.76428 Mode=0
  profile: super ellipse Super_Height=0.39624 Super_M=2 Super_MaxWidthLoc=0 Super_N=1 Super_Width=7.3152

BodyOfRevolution "Turbofan_9_mirror"
  location (X Y Z) 15.24 -41.6052 10.3632, rotation 0 0 0
  bounding box size 7.3152 4.16052 4.16052
  Design: A0=11.1289 Ae=11.1289 Amin=8.90932 AminW=0.25 Angle=0 Diameter=3.76428 Mode=0
  profile: super ellipse Super_Height=0.39624 Super_M=2 Super_MaxWidthLoc=0 Super_N=1 Super_Width=7.3152
